# ============================================================================
# S-параметры отрезка ЛП с последоват.  вх/вых. конденсаторами Cs
ORIGIN := 1
nf := 500
i := 2 .. nf
j := sqrt(-1)
fmin := 0
fmax := 20  # - задание частотного диапазона, ГГц
# Длина ЛП, м
f[i] := fmin + (fmax - fmin)/(nf - 1)*i
ω := 2*π*f*10^9
len := .005
# Погонные и модальные параметры ЛП
R1 := 0*200
G1 := 0*0.20
L1 := .412*10^-6
C1 := 176*10^-12  # R1, G1,  L1, C1 - погонные параметры ЛП, 1/м
Z0 := sqrt(L1/C1) = 48.3829  # Ом
εef := (3*10^8)^2*L1*C1 = 6.52608  # - эффективная диэл.проницаемость
Z1[i] := R1 + j*ω[i]*L1
Y1[i] := G1 + 1j*ω[i]*C1  # Z1, Y1 - полные погонные параметры ЛП, 1/м
Zo[i] := sqrt(Z1[i]*Y1[i]^-1)
γ[i] := sqrt(Z1[i]*Y1[i])
θ := γ*len
# Матрица проводимостей отрезка ЛП с потерями
za[i] := Zo[i]*[coth(θ[i]), csch(θ[i]); csch(θ[i]), coth(θ[i])]  # - ненормир. проводимость, См
# Конденсаторы вх/вых последоват.  Cs, Ф
Cs := .05*10^-12  # Ф
# Нагрузки (вх/вых), Ом
zb[i] := [(j*ω[i]*Cs)^-1, 0; 0, (j*ω[i]*Cs)^-1]  # ЛП + вх/вых. конденсаторы
Zin := Z0*sqrt(2)^-1 = 34.2119
z := za + zb
Zout := Z0*sqrt(2) = 68.4238
# Матрица нагрузочных импедансов (сопротивлений)
Zc := sqrt(Zin*Zout) = 48.3829
n := sqrt(Zout*Zin^-1) = 1.41421
# Нормирование y -> Y: | n - коэф. трансформации
YT := [sqrt(Zin), 0; 0, sqrt(Zout)]^-1
Z[i] := YT*z[i]*YT
# Матрица рассеяния  отрезка ЛП c потерями
E := identity(2) = [1, 0; 0, 1]
SS[i] := E - 2*(E + Z[i])^-1
s11[i] := 20*log(|SS[i][1, 1]|)
s22[i] := 20*log(|SS[i][2, 2]|)
s12[i] := 20*log(|SS[i][1, 2]|)
ϕ11[i] := arg(SS[i][1, 1])*57.3
ϕ22[i] := arg(SS[i][2, 2])*57.3
ϕ12[i] := arg(SS[i][1, 2])*57.3
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# ============================================================================
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