# ============================================================================
# S-параметры  отрезка ЛП с параллельными  вх/вых.  конденсаторами Сp
ORIGIN := 1
nf := 500
i := 2 .. nf
j := sqrt(-1)
fmin := 0
fmax := 20  # - задание частотного диапазона, ГГц
# Длина ЛП, м
f[i] := fmin + (fmax - fmin)/(nf - 1)*i
ω := 2*π*f*10^9
len := .005
# Погонные и модальные параметры ЛП
R1 := 0
G1 := 0.00
L1 := .412*10^-6
C1 := 176*10^-12  # R1, G1,  L1, C1 - погонные параметры ЛП, 1/м
Z0 := sqrt(L1/C1) = 48.3829  # Ом
εef := (3*10^8)^2*L1*C1 = 6.52608  # - эффективная диэл.проницаемость
Z1[i] := R1 + j*ω[i]*L1
Y1[i] := G1 + 1j*ω[i]*C1  # Z1, Y1 - полные погонные параметры ЛП, 1/м
Zo[i] := sqrt(Z1[i]*Y1[i]^-1)
γ[i] := sqrt(Z1[i]*Y1[i])
θ := γ*len
# Матрица проводимостей отрезка ЛП с потерями
ya[i] := 1/Zo[i]*[coth(θ[i]), -csch(θ[i]); -csch(θ[i]), coth(θ[i])]  # - ненормир. проводимость, См
# Конденсаторы вх/вых параллельные Сp, Ф
Cp := 1*.2*10^-12  # Ф
# Нагрузки (вх/вых), Ом
yb[i] := [j*ω[i]*Cp, 0; 0, j*ω[i]*Cp]
# ЛП + вх/вых. индукторы
Zin := Z0*sqrt(2)^-1 = 34.2119
Zin := Z0  # disabled
y := ya + yb
Zout := Z0*sqrt(2) = 68.4238
Zout := Z0  # disabled
# Матрица нагрузочных импедансов (сопротивлений)
Zc := sqrt(Zin*Zout) = 48.3829
n := sqrt(Zout*Zin^-1) = 1.41421
# Нормирование y -> Y: | n - коэф. трансформации
ZT := [sqrt(Zin), 0; 0, sqrt(Zout)]
Y[i] := ZT*y[i]*ZT
# Матрица рассеяния  отрезка ЛП c потерями
E := identity(2) = [1, 0; 0, 1]
SS[i] := 2*(E + Y[i])^-1 - E
s11[i] := 20*log(|SS[i][1, 1]|)
s22[i] := 20*log(|SS[i][2, 2]|)
s12[i] := 20*log(|SS[i][1, 2]|)
ϕ11[i] := arg(SS[i][1, 1])*57.3
ϕ11[i] := if(ϕ11[i] - ϕ11[i - 1] > 195, ϕ11[i] - 360, ϕ11[i])  # disabled
ϕ22[i] := arg(SS[i][2, 2])*57.3
ϕ22[i] := if(ϕ22[i] - ϕ22[i - 1] > 195, ϕ22[i] - 360, ϕ22[i])  # disabled
ϕ12[i] := arg(SS[i][1, 2])*57.3
ϕ12[i] := if(ϕ12[i] - ϕ12[i - 1] > 195, ϕ12[i] - 360, ϕ12[i])  # disabled
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# ============================================================================
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